// JSON to GLM Converter Output
 // CLOCK
clock {
	timezone PST8PDT;
	starttime "2001-01-01 00:00:00 PST";
	stoptime "2002-01-01 00:00:00 PST";
}
 // MODULES
module residential{
	message_flags DEBUG|VERBOSE;
	default_line_voltage +240+0d V;
	default_line_current +0+0j A;
	default_outdoor_temperature +74 degF;
	default_humidity +75 %;
	default_solar +0 Btu/sf;
	default_etp_iterations 100;
	ANSI_voltage_check TRUE;
	enable_subsecond_models FALSE;
	deltamode_timestep +1e+07 ns;
	all_house_delta FALSE;
	implicit_enduses NONE;
	implicit_enduse_source ELCAP1990;
	house_low_temperature_warning +55 degF;
	house_high_temperature_warning +95 degF;
	thermostat_control_warning +4.94066e-324;
	system_dwell_time +1 s;
	aux_cutin_temperature +10 degF;
	paneldump_filename paneldump.csv;
	paneldump_interval 0;
	paneldump_resolution +0;
}
module tape{
	gnuplot_path /usr/bin/gnuplot;
	flush_interval 0;
	csv_data_only 0;
	csv_keep_clean 0;
	delta_mode_needed NEVER;
}
module assert{
	message_flags DEBUG|VERBOSE;
}
 // GLOBALS
// version.major is set to 4
// version.minor is set to 2
// version.patch is set to 0
// version.build is set to 200108
// version.branch is set to master
// command_line is set to /usr/local/bin/gridlabd.bin test_lights.glm
#ifndef environment
global char1024 environment "batch";
#else
#set environment="batch"
#endif //environment
#ifndef quiet
global bool quiet FALSE;
#else
#set quiet=FALSE
#endif //quiet
#ifndef warn
global bool warn TRUE;
#else
#set warn=TRUE
#endif //warn
#ifndef debugger
global bool debugger FALSE;
#else
#set debugger=FALSE
#endif //debugger
#ifndef gdb
global bool gdb FALSE;
#else
#set gdb=FALSE
#endif //gdb
#ifndef debug
global bool debug FALSE;
#else
#set debug=FALSE
#endif //debug
#ifndef test
global bool test FALSE;
#else
#set test=FALSE
#endif //test
#ifndef verbose
global bool verbose FALSE;
#else
#set verbose=FALSE
#endif //verbose
#ifndef iteration_limit
global int32 iteration_limit 100;
#else
#set iteration_limit=100
#endif //iteration_limit
// workdir is set to /test_files
#ifndef dumpfile
global char1024 dumpfile "gridlabd.json";
#else
#set dumpfile="gridlabd.json"
#endif //dumpfile
#ifndef savefile
global char1024 savefile "test_lights.json";
#else
#set savefile="test_lights.json"
#endif //savefile
#ifndef dumpall
global bool dumpall FALSE;
#else
#set dumpall=FALSE
#endif //dumpall
#ifndef runchecks
global bool runchecks FALSE;
#else
#set runchecks=FALSE
#endif //runchecks
#ifndef threadcount
global int32 threadcount 1;
#else
#set threadcount=1
#endif //threadcount
#ifndef profiler
global bool profiler FALSE;
#else
#set profiler=FALSE
#endif //profiler
#ifndef pauseatexit
global bool pauseatexit FALSE;
#else
#set pauseatexit=FALSE
#endif //pauseatexit
#ifndef testoutputfile
global char1024 testoutputfile "test.txt";
#else
#set testoutputfile="test.txt"
#endif //testoutputfile
#ifndef xml_encoding
global int32 xml_encoding 8;
#else
#set xml_encoding=8
#endif //xml_encoding
#ifndef clock
global timestamp clock "2002-01-01 00:00:00 PST";
#else
#set clock="2002-01-01 00:00:00 PST"
#endif //clock
#ifndef starttime
global timestamp starttime "2001-01-01 00:00:00 PST";
#else
#set starttime="2001-01-01 00:00:00 PST"
#endif //starttime
#ifndef stoptime
global timestamp stoptime "2002-01-01 00:00:00 PST";
#else
#set stoptime="2002-01-01 00:00:00 PST"
#endif //stoptime
#ifndef double_format
global char32 double_format "%+lg";
#else
#set double_format="%+lg"
#endif //double_format
#ifndef complex_format
global char256 complex_format "%+lg%+lg%c";
#else
#set complex_format="%+lg%+lg%c"
#endif //complex_format
#ifndef object_format
global char32 object_format "%s:%d";
#else
#set object_format="%s:%d"
#endif //object_format
#ifndef object_scan
global char32 object_scan "%[^:]:%d";
#else
#set object_scan="%[^:]:%d"
#endif //object_scan
#ifndef object_tree_balance
global bool object_tree_balance FALSE;
#else
#set object_tree_balance=FALSE
#endif //object_tree_balance
// kmlfile is set to
#ifndef kmlhost
global char1024 kmlhost "https://raw.githubusercontent.com/dchassin/gridlabd/master/gldcore/rt";
#else
#set kmlhost="https://raw.githubusercontent.com/dchassin/gridlabd/master/gldcore/rt"
#endif //kmlhost
// modelname is set to test_lights.glm
// execdir is set to /usr/local/bin
#ifndef strictnames
global bool strictnames TRUE;
#else
#set strictnames=TRUE
#endif //strictnames
#ifndef website
global char1024 website "http://www.gridlabd.org/";
#else
#set website="http://www.gridlabd.org/"
#endif //website
#ifndef urlbase
global char1024 urlbase "http://www.gridlabd.org/";
#else
#set urlbase="http://www.gridlabd.org/"
#endif //urlbase
#ifndef randomseed
global int32 randomseed 0;
#else
#set randomseed=0
#endif //randomseed
#ifndef randomstate
global int32 randomstate 0;
#else
#set randomstate=0
#endif //randomstate
// include is set to
// trace is set to
#ifndef gdb_window
global bool gdb_window FALSE;
#else
#set gdb_window=FALSE
#endif //gdb_window
#ifndef tmp
global char1024 tmp "/root/.gridlabd/tmp";
#else
#set tmp="/root/.gridlabd/tmp"
#endif //tmp
#ifndef force_compile
global int32 force_compile 0;
#else
#set force_compile=0
#endif //force_compile
#ifndef nolocks
global bool nolocks FALSE;
#else
#set nolocks=FALSE
#endif //nolocks
#ifndef skipsafe
global bool skipsafe FALSE;
#else
#set skipsafe=FALSE
#endif //skipsafe
#ifndef dateformat
global enumeration dateformat ISO;
#else
#set dateformat=ISO
#endif //dateformat
#ifndef init_sequence
global enumeration init_sequence DEFERRED;
#else
#set init_sequence=DEFERRED
#endif //init_sequence
#ifndef minimum_timestep
global int32 minimum_timestep 1;
#else
#set minimum_timestep=1
#endif //minimum_timestep
// platform is set to LINUX
#ifndef suppress_repeat_messages
global bool suppress_repeat_messages TRUE;
#else
#set suppress_repeat_messages=TRUE
#endif //suppress_repeat_messages
#ifndef maximum_synctime
global int32 maximum_synctime 60;
#else
#set maximum_synctime=60
#endif //maximum_synctime
#ifndef run_realtime
global bool run_realtime FALSE;
#else
#set run_realtime=FALSE
#endif //run_realtime
#ifndef enter_realtime
global timestamp enter_realtime "NEVER";
#else
#set enter_realtime="NEVER"
#endif //enter_realtime
// realtime_metric is set to +0
#ifndef no_deprecate
global bool no_deprecate FALSE;
#else
#set no_deprecate=FALSE
#endif //no_deprecate
// streaming_io is set to FALSE
// compileonly is set to FALSE
#ifndef relax_naming_rules
global bool relax_naming_rules FALSE;
#else
#set relax_naming_rules=FALSE
#endif //relax_naming_rules
#ifndef browser
global char1024 browser "firefox";
#else
#set browser="firefox"
#endif //browser
#ifndef server_portnum
global int32 server_portnum 0;
#else
#set server_portnum=0
#endif //server_portnum
#ifndef server_quit_on_close
global bool server_quit_on_close FALSE;
#else
#set server_quit_on_close=FALSE
#endif //server_quit_on_close
// client_allowed is set to
#ifndef autoclean
global bool autoclean TRUE;
#else
#set autoclean=TRUE
#endif //autoclean
#ifndef technology_readiness_level
global enumeration technology_readiness_level UNKNOWN;
#else
#set technology_readiness_level=UNKNOWN
#endif //technology_readiness_level
#ifndef show_progress
global bool show_progress TRUE;
#else
#set show_progress=TRUE
#endif //show_progress
#ifndef checkpoint_type
global enumeration checkpoint_type NONE;
#else
#set checkpoint_type=NONE
#endif //checkpoint_type
// checkpoint_file is set to
#ifndef checkpoint_seqnum
global int32 checkpoint_seqnum 0;
#else
#set checkpoint_seqnum=0
#endif //checkpoint_seqnum
#ifndef checkpoint_interval
global int32 checkpoint_interval 0;
#else
#set checkpoint_interval=0
#endif //checkpoint_interval
#ifndef checkpoint_keepall
global bool checkpoint_keepall FALSE;
#else
#set checkpoint_keepall=FALSE
#endif //checkpoint_keepall
#ifndef check_version
global bool check_version FALSE;
#else
#set check_version=FALSE
#endif //check_version
#ifndef random_number_generator
global enumeration random_number_generator RNG3;
#else
#set random_number_generator=RNG3
#endif //random_number_generator
#ifndef mainloop_state
global enumeration mainloop_state INIT;
#else
#set mainloop_state=INIT
#endif //mainloop_state
#ifndef pauseat
global timestamp pauseat "NEVER";
#else
#set pauseat="NEVER"
#endif //pauseat
// infourl is set to http://gridlab-d.shoutwiki.com/w/index.php?title=Special%3ASearch&fulltext=Search&search=
#ifndef hostname
global char1024 hostname "localhost";
#else
#set hostname="localhost"
#endif //hostname
#ifndef hostaddr
global char32 hostaddr "127.0.0.1";
#else
#set hostaddr="127.0.0.1"
#endif //hostaddr
#ifndef autostart_gui
global bool autostart_gui TRUE;
#else
#set autostart_gui=TRUE
#endif //autostart_gui
// master is set to
#ifndef master_port
global int64 master_port 0;
#else
#set master_port=0
#endif //master_port
#ifndef multirun_mode
global enumeration multirun_mode STANDALONE;
#else
#set multirun_mode=STANDALONE
#endif //multirun_mode
#ifndef multirun_conn
global enumeration multirun_conn NONE;
#else
#set multirun_conn=NONE
#endif //multirun_conn
#ifndef signal_timeout
global int32 signal_timeout 5000;
#else
#set signal_timeout=5000
#endif //signal_timeout
#ifndef slave_port
global int16 slave_port 6267;
#else
#set slave_port=6267
#endif //slave_port
#ifndef slave_id
global int64 slave_id 0;
#else
#set slave_id=0
#endif //slave_id
// return_code is set to 0
// exit_code is set to 5
// module_compiler_flags is set to
// init_max_defer is set to 64
#ifndef mt_analysis
global bool mt_analysis FALSE;
#else
#set mt_analysis=FALSE
#endif //mt_analysis
#ifndef inline_block_size
global int32 inline_block_size 1048576;
#else
#set inline_block_size=1048576
#endif //inline_block_size
#ifndef validate
global set validate TSTD|RALL;
#else
#set validate=TSTD|RALL
#endif //validate
#ifndef sanitize
global set sanitize NAMES|POSITIONS;
#else
#set sanitize=NAMES|POSITIONS
#endif //sanitize
#ifndef sanitize_prefix
global char8 sanitize_prefix "GLD_";
#else
#set sanitize_prefix="GLD_"
#endif //sanitize_prefix
#ifndef sanitize_index
global char1024 sanitize_index ".txt";
#else
#set sanitize_index=".txt"
#endif //sanitize_index
// sanitize_offset is set to
#ifndef simulation_mode
global enumeration simulation_mode INIT;
#else
#set simulation_mode=INIT
#endif //simulation_mode
#ifndef deltamode_allowed
global bool deltamode_allowed FALSE;
#else
#set deltamode_allowed=FALSE
#endif //deltamode_allowed
#ifndef deltamode_timestep
global int32 deltamode_timestep 10000000;
#else
#set deltamode_timestep=10000000
#endif //deltamode_timestep
#ifndef deltamode_maximumtime
global int64 deltamode_maximumtime 3600000000000;
#else
#set deltamode_maximumtime=3600000000000
#endif //deltamode_maximumtime
#ifndef deltaclock
global int64 deltaclock 0;
#else
#set deltaclock=0
#endif //deltaclock
#ifndef delta_current_clock
global double delta_current_clock +0;
#else
#set delta_current_clock=+0
#endif //delta_current_clock
// deltamode_updateorder is set to residential,tape
#ifndef deltamode_iteration_limit
global int32 deltamode_iteration_limit 10;
#else
#set deltamode_iteration_limit=10
#endif //deltamode_iteration_limit
#ifndef deltamode_forced_extra_timesteps
global int32 deltamode_forced_extra_timesteps 0;
#else
#set deltamode_forced_extra_timesteps=0
#endif //deltamode_forced_extra_timesteps
#ifndef deltamode_forced_always
global bool deltamode_forced_always FALSE;
#else
#set deltamode_forced_always=FALSE
#endif //deltamode_forced_always
#ifndef run_powerworld
global bool run_powerworld FALSE;
#else
#set run_powerworld=FALSE
#endif //run_powerworld
#ifndef bigranks
global bool bigranks TRUE;
#else
#set bigranks=TRUE
#endif //bigranks
// exename is set to /usr/local/bin/gridlabd.bin
#ifndef wget_options
global char1024 wget_options "maxsize:100MB;update:newer";
#else
#set wget_options="maxsize:100MB;update:newer"
#endif //wget_options
#ifndef curl_options
global char1024 curl_options "maxsize:100MB;update:newer";
#else
#set curl_options="maxsize:100MB;update:newer"
#endif //curl_options
#ifndef svnroot
global char1024 svnroot "http://gridlab-d.svn.sourceforge.net/svnroot/gridlab-d";
#else
#set svnroot="http://gridlab-d.svn.sourceforge.net/svnroot/gridlab-d"
#endif //svnroot
#ifndef github
global char1024 github "https://github.com/gridlab-d";
#else
#set github="https://github.com/gridlab-d"
#endif //github
#ifndef gitraw
global char1024 gitraw "https://raw.githubusercontent.com/gridlab-d";
#else
#set gitraw="https://raw.githubusercontent.com/gridlab-d"
#endif //gitraw
#ifndef allow_reinclude
global bool allow_reinclude FALSE;
#else
#set allow_reinclude=FALSE
#endif //allow_reinclude
#ifndef output_message_context
global set output_message_context ALL;
#else
#set output_message_context=ALL
#endif //output_message_context
#ifndef permissive_access
global int32 permissive_access 0;
#else
#set permissive_access=0
#endif //permissive_access
#ifndef relax_undefined_if
global bool relax_undefined_if FALSE;
#else
#set relax_undefined_if=FALSE
#endif //relax_undefined_if
#ifndef literal_if
global bool literal_if FALSE;
#else
#set literal_if=FALSE
#endif //literal_if
#ifndef validto_context
global enumeration validto_context SYNC;
#else
#set validto_context=SYNC
#endif //validto_context
#ifndef daemon_configfile
global char1024 daemon_configfile "gridlabd.cnf";
#else
#set daemon_configfile="gridlabd.cnf"
#endif //daemon_configfile
// timezone_locale is set to PST8PDT
#ifndef glm_save_options
global set glm_save_options LEGACY;
#else
#set glm_save_options=LEGACY
#endif //glm_save_options
#ifndef filesave_options
global set filesave_options ALL;
#else
#set filesave_options=ALL
#endif //filesave_options
#ifndef ignore_errors
global bool ignore_errors FALSE;
#else
#set ignore_errors=FALSE
#endif //ignore_errors
// residential::message_flags is set to DEBUG|VERBOSE
// residential::default_line_voltage is set to +240+0d V
// residential::default_line_current is set to +0+0j A
// residential::default_outdoor_temperature is set to +74 degF
// residential::default_humidity is set to +75 %
// residential::default_solar is set to +0 Btu/sf
// residential::default_etp_iterations is set to 100
// residential::ANSI_voltage_check is set to TRUE
// residential::enable_subsecond_models is set to FALSE
// residential::deltamode_timestep is set to +1e+07 ns
// residential::all_house_delta is set to FALSE
// residential::implicit_enduses is set to NONE
// residential::implicit_enduse_source is set to ELCAP1990
// residential::house_low_temperature_warning is set to +55 degF
// residential::house_high_temperature_warning is set to +95 degF
// residential::thermostat_control_warning is set to +4.94066e-324
// residential::system_dwell_time is set to +1 s
// residential::aux_cutin_temperature is set to +10 degF
// residential::paneldump_filename is set to paneldump.csv
// residential::paneldump_interval is set to 0
// residential::paneldump_resolution is set to +0
#ifndef default_nominal_voltage_A
global complex default_nominal_voltage_A +240+0d;
#else
#set default_nominal_voltage_A=+240+0d
#endif //default_nominal_voltage_A
#ifndef default_nominal_voltage_B
global complex default_nominal_voltage_B +268.328-26.5651d;
#else
#set default_nominal_voltage_B=+268.328-26.5651d
#endif //default_nominal_voltage_B
#ifndef default_nominal_voltage_C
global complex default_nominal_voltage_C +268.328+26.5651d;
#else
#set default_nominal_voltage_C=+268.328+26.5651d
#endif //default_nominal_voltage_C
#ifndef default_nominal_voltage
global double default_nominal_voltage +240;
#else
#set default_nominal_voltage=+240
#endif //default_nominal_voltage
#ifndef default_weekday_code
global char32 default_weekday_code "WEEKDAY";
#else
#set default_weekday_code="WEEKDAY"
#endif //default_weekday_code
#ifndef default_saturday_code
global char32 default_saturday_code "SATURDAY";
#else
#set default_saturday_code="SATURDAY"
#endif //default_saturday_code
#ifndef default_sunday_code
global char32 default_sunday_code "SUNDAY";
#else
#set default_sunday_code="SUNDAY"
#endif //default_sunday_code
#ifndef default_holiday_code
global char32 default_holiday_code "HOLIDAY";
#else
#set default_holiday_code="HOLIDAY"
#endif //default_holiday_code
#ifndef default_month_heading
global char32 default_month_heading "Month";
#else
#set default_month_heading="Month"
#endif //default_month_heading
#ifndef default_daytype_heading
global char32 default_daytype_heading "Daytype";
#else
#set default_daytype_heading="Daytype"
#endif //default_daytype_heading
#ifndef default_hour_heading
global char32 default_hour_heading "Hour";
#else
#set default_hour_heading="Hour"
#endif //default_hour_heading
#ifndef default_temperature_heating_balance
global double default_temperature_heating_balance +55;
#else
#set default_temperature_heating_balance=+55
#endif //default_temperature_heating_balance
#ifndef default_temperature_cooling_balance
global double default_temperature_cooling_balance +70;
#else
#set default_temperature_cooling_balance=+70
#endif //default_temperature_cooling_balance
#ifndef default_temperature_heating_base
global double default_temperature_heating_base +55;
#else
#set default_temperature_heating_base=+55
#endif //default_temperature_heating_base
#ifndef default_temperature_cooling_base
global double default_temperature_cooling_base +70;
#else
#set default_temperature_cooling_base=+70
#endif //default_temperature_cooling_base
#ifndef default_temperature_heating_design
global double default_temperature_heating_design +0;
#else
#set default_temperature_heating_design=+0
#endif //default_temperature_heating_design
#ifndef default_temperature_cooling_design
global double default_temperature_cooling_design +100;
#else
#set default_temperature_cooling_design=+100
#endif //default_temperature_cooling_design
#ifndef default_solargain_base
global double default_solargain_base +0;
#else
#set default_solargain_base=+0
#endif //default_solargain_base
#ifndef default_price_base
global double default_price_base +0;
#else
#set default_price_base=+0
#endif //default_price_base
#ifndef default_occupancy_base
global double default_occupancy_base +1;
#else
#set default_occupancy_base=+1
#endif //default_occupancy_base
#ifndef temperature_variable_name
global char1024 temperature_variable_name "temperature";
#else
#set temperature_variable_name="temperature"
#endif //temperature_variable_name
#ifndef solargain_variable_name
global char1024 solargain_variable_name "solar_direct";
#else
#set solargain_variable_name="solar_direct"
#endif //solargain_variable_name
#ifndef price_variable_name
global char1024 price_variable_name "energy_price";
#else
#set price_variable_name="energy_price"
#endif //price_variable_name
#ifndef occupancy_variable_name
global char1024 occupancy_variable_name "occupancy_fraction";
#else
#set occupancy_variable_name="occupancy_fraction"
#endif //occupancy_variable_name
// tape::gnuplot_path is set to /usr/bin/gnuplot
// tape::flush_interval is set to 0
// tape::csv_data_only is set to 0
// tape::csv_keep_clean is set to 0
// tape::delta_mode_needed is set to NEVER
// assert::message_flags is set to DEBUG|VERBOSE
 // CLASSES
 // SCHEDULES
 // OBJECTS
